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/batch
! ANSYS input file written by Workbench version 2023 R2
! File used for geometry attach: C:\Users\skrua\AppData\Local\Temp\WB_skrua_38332_2\wbnew_files\dp0\SYS\DM\SYS.agdb
/title,wbnew--Static Structural (A5)
/COM,/COM,     ANSYSMotion, 2023.2
/com,--- Data in consistent NMM units. See Solving Units in the help system for more information.
/units,MPA
/prep7
! Turn off shape checking because checks already performed inside WB mesher.
! See help system for more information.
SHPP,OFF,,NOWARN
etcon,set             ! allow ANSYS to choose best KEYOP's for 180x elements, resets any applicable keyopt to MAPDL defaults
/com,*********** Nodes for the whole assembly ***********
nblock,3,,290
(1i9,3e20.9e3)
        1     2.400000000E+03     3.600000000E+03     3.600000000E+03
        2     2.400000000E+03     3.600000000E+03     0.000000000E+00
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-1
/com,*********** Elements for Body 1 "Line Body" ***********
et,1,188
keyo,1,3,2
eblock,19,solid,,15
(19i9)
        1        1        1        1        0        0        0        0        3        0        1        1        3      133
        1        1        1        1        0        0        0        0        3        0        2        3        4      134
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-1
/com,*********** Elements for Body 2 "Line Body" ***********
et,2,188
keyo,2,3,2
eblock,19,solid,,15
(19i9)
        2        2        2        2        0        0        0        0        3        0       16       17       19      148
        2        2        2        2        0        0        0        0        3        0       17       19       20      149
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-1
/com,*********** Elements for Body 3 "Line Body" ***********
et,3,188
keyo,3,3,2
eblock,19,solid,,15
(19i9)
        3        3        3        3        0        0        0        0        3        0       31       33       35      163
        3        3        3        3        0        0        0        0        3        0       32       35       36      164
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-1
/com,*********** Elements for Body 4 "Line Body" ***********
et,4,188
keyo,4,3,2
eblock,19,solid,,15
(19i9)
        4        4        4        4        0        0        0        0        3        0       46       49       51      178
        4        4        4        4        0        0        0        0        3        0       47       51       52      179
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-1
/com,*********** Elements for Body 5 "Line Body" ***********
et,5,188
keyo,5,3,2
eblock,19,solid,,40
(19i9)
        5        5        5        5        0        0        0        0        3        0       61       62       66      193
        5        5        5        5        0        0        0        0        3        0       62       66       67      194
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-1
/com,*********** Elements for Body 6 "Line Body" ***********
et,6,188
keyo,6,3,2
eblock,19,solid,,8
(19i9)
        6        6        6        6        0        0        0        0        3        0      101        1      102      233
        6        6        6        6        0        0        0        0        3        0      102      102      103      234
        6        6        6        6        0        0        0        0        3        0      103      103      104      235
        6        6        6        6        0        0        0        0        3        0      104      104      101      236
        6        6        6        6        0        0        0        0        3        0      105        1      106      237
        6        6        6        6        0        0        0        0        3        0      106      106      107      238
        6        6        6        6        0        0        0        0        3        0      107      107      108      239
        6        6        6        6        0        0        0        0        3        0      108      108      105      240
-1
/com,*********** Elements for Body 7 "Line Body" ***********
et,7,188
keyo,7,3,2
eblock,19,solid,,8
(19i9)
        7        7        7        7        0        0        0        0        3        0      109       49      110      241
        7        7        7        7        0        0        0        0        3        0      110      110      111      242
        7        7        7        7        0        0        0        0        3        0      111      111      112      243
        7        7        7        7        0        0        0        0        3        0      112      112      109      244
        7        7        7        7        0        0        0        0        3        0      113       49      114      245
        7        7        7        7        0        0        0        0        3        0      114      114      115      246
        7        7        7        7        0        0        0        0        3        0      115      115      116      247
        7        7        7        7        0        0        0        0        3        0      116      116      113      248
-1
/com,*********** Elements for Body 8 "Line Body" ***********
et,8,188
keyo,8,3,2
eblock,19,solid,,8
(19i9)
        8        8        8        8        0        0        0        0        3        0      117       33      118      249
        8        8        8        8        0        0        0        0        3        0      118      118      119      250
        8        8        8        8        0        0        0        0        3        0      119      119      120      251
        8        8        8        8        0        0        0        0        3        0      120      120      117      252
        8        8        8        8        0        0        0        0        3        0      121       33      122      253
        8        8        8        8        0        0        0        0        3        0      122      122      123      254
        8        8        8        8        0        0        0        0        3        0      123      123      124      255
        8        8        8        8        0        0        0        0        3        0      124      124      121      256
-1
/com,*********** Elements for Body 9 "Line Body" ***********
et,9,188
keyo,9,3,2
eblock,19,solid,,8
(19i9)
        9        9        9        9        0        0        0        0        3        0      125       17      126      257
        9        9        9        9        0        0        0        0        3        0      126      126      127      258
        9        9        9        9        0        0        0        0        3        0      127      127      128      259
        9        9        9        9        0        0        0        0        3        0      128      128      125      260
        9        9        9        9        0        0        0        0        3        0      129       17      130      261
        9        9        9        9        0        0        0        0        3        0      130      130      131      262
        9        9        9        9        0        0        0        0        3        0      131      131      132      263
        9        9        9        9        0        0        0        0        3        0      132      132      129      264
-1
/com,*********** Send User Defined Coordinate System(s) ***********
csys,0
toffst,273.15,  ! Temperature offset from absolute zero
/com,*********** Set Reference Temperature ***********
tref,22.
/com,*********** Send Materials ***********
Temperature = 'TEMP' ! Temperature
MP,DENS,1,7.85e-09,	! tonne mm^-3
MP,ALPX,1,1.2e-05,	! C^-1
MP,C,1,434000000,	! mm^2 s^-2 C^-1
MP,KXX,1,60.5,	! tonne mm s^-3 C^-1
MP,RSVX,1,0.00017,	! ohm mm
MP,EX,1,200000,	! tonne s^-2 mm^-1
MP,NUXY,1,0.3,
MP,MURX,1,10000,

Temperature = 'TEMP' ! Temperature
MP,DENS,2,7.85e-09,	! tonne mm^-3
MP,ALPX,2,1.2e-05,	! C^-1
MP,C,2,434000000,	! mm^2 s^-2 C^-1
MP,KXX,2,60.5,	! tonne mm s^-3 C^-1
MP,RSVX,2,0.00017,	! ohm mm
MP,EX,2,200000,	! tonne s^-2 mm^-1
MP,NUXY,2,0.3,
MP,MURX,2,10000,

Temperature = 'TEMP' ! Temperature
MP,DENS,3,7.85e-09,	! tonne mm^-3
MP,ALPX,3,1.2e-05,	! C^-1
MP,C,3,434000000,	! mm^2 s^-2 C^-1
MP,KXX,3,60.5,	! tonne mm s^-3 C^-1
MP,RSVX,3,0.00017,	! ohm mm
MP,EX,3,200000,	! tonne s^-2 mm^-1
MP,NUXY,3,0.3,
MP,MURX,3,10000,

Temperature = 'TEMP' ! Temperature
MP,DENS,4,7.85e-09,	! tonne mm^-3
MP,ALPX,4,1.2e-05,	! C^-1
MP,C,4,434000000,	! mm^2 s^-2 C^-1
MP,KXX,4,60.5,	! tonne mm s^-3 C^-1
MP,RSVX,4,0.00017,	! ohm mm
MP,EX,4,200000,	! tonne s^-2 mm^-1
MP,NUXY,4,0.3,
MP,MURX,4,10000,

Temperature = 'TEMP' ! Temperature
MP,DENS,5,7.85e-09,	! tonne mm^-3
MP,ALPX,5,1.2e-05,	! C^-1
MP,C,5,434000000,	! mm^2 s^-2 C^-1
MP,KXX,5,60.5,	! tonne mm s^-3 C^-1
MP,RSVX,5,0.00017,	! ohm mm
MP,EX,5,200000,	! tonne s^-2 mm^-1
MP,NUXY,5,0.3,
MP,MURX,5,10000,

Temperature = 'TEMP' ! Temperature
MP,DENS,6,7.85e-09,	! tonne mm^-3
MP,ALPX,6,1.2e-05,	! C^-1
MP,C,6,434000000,	! mm^2 s^-2 C^-1
MP,KXX,6,60.5,	! tonne mm s^-3 C^-1
MP,RSVX,6,0.00017,	! ohm mm
MP,EX,6,200000,	! tonne s^-2 mm^-1
MP,NUXY,6,0.3,
MP,MURX,6,10000,

Temperature = 'TEMP' ! Temperature
MP,DENS,7,7.85e-09,	! tonne mm^-3
MP,ALPX,7,1.2e-05,	! C^-1
MP,C,7,434000000,	! mm^2 s^-2 C^-1
MP,KXX,7,60.5,	! tonne mm s^-3 C^-1
MP,RSVX,7,0.00017,	! ohm mm
MP,EX,7,200000,	! tonne s^-2 mm^-1
MP,NUXY,7,0.3,
MP,MURX,7,10000,

Temperature = 'TEMP' ! Temperature
MP,DENS,8,7.85e-09,	! tonne mm^-3
MP,ALPX,8,1.2e-05,	! C^-1
MP,C,8,434000000,	! mm^2 s^-2 C^-1
MP,KXX,8,60.5,	! tonne mm s^-3 C^-1
MP,RSVX,8,0.00017,	! ohm mm
MP,EX,8,200000,	! tonne s^-2 mm^-1
MP,NUXY,8,0.3,
MP,MURX,8,10000,

Temperature = 'TEMP' ! Temperature
MP,DENS,9,7.85e-09,	! tonne mm^-3
MP,ALPX,9,1.2e-05,	! C^-1
MP,C,9,434000000,	! mm^2 s^-2 C^-1
MP,KXX,9,60.5,	! tonne mm s^-3 C^-1
MP,RSVX,9,0.00017,	! ohm mm
MP,EX,9,200000,	! tonne s^-2 mm^-1
MP,NUXY,9,0.3,
MP,MURX,9,10000,

/com,*********** Send Beam Properties ***********
SECTYPE,1,BEAM,HREC
SECDATA,152.4,152.4,4.7625,4.7625,4.7625,4.7625
secoffset,cent

SECTYPE,2,BEAM,HREC
SECDATA,152.4,152.4,4.7625,4.7625,4.7625,4.7625
secoffset,cent

SECTYPE,3,BEAM,HREC
SECDATA,152.4,152.4,4.7625,4.7625,4.7625,4.7625
secoffset,cent

SECTYPE,4,BEAM,HREC
SECDATA,152.4,152.4,4.7625,4.7625,4.7625,4.7625
secoffset,cent

SECTYPE,5,BEAM,I
SECDATA,152.78,152.78,454.66,13.335,13.335,8.001
secoffset,cent

SECTYPE,6,BEAM,CTUB
SECDATA,26.251,30.1625
secoffset,cent

SECTYPE,7,BEAM,CTUB
SECDATA,26.251,30.1625
secoffset,cent

SECTYPE,8,BEAM,CTUB
SECDATA,26.251,30.1625
secoffset,cent

SECTYPE,9,BEAM,CTUB
SECDATA,26.251,30.1625
secoffset,cent

!************************* Model Summary ********************
!Line Body,	Structural Steel,	matid,	1
!Line Body,	Structural Steel,	matid,	2
!Line Body,	Structural Steel,	matid,	3
!Line Body,	Structural Steel,	matid,	4
!Line Body,	Structural Steel,	matid,	5
!Line Body,	Structural Steel,	matid,	6
!Line Body,	Structural Steel,	matid,	7
!Line Body,	Structural Steel,	matid,	8
!Line Body,	Structural Steel,	matid,	9
!************************* End Model Summary ********************
/com,******* Constant Zero Displacement Y *******
CMBLOCK,_DISPZEROUY,NODE,        4
(8i10)
         2        18        34        50
cmsel,s,_DISPZEROUY
d,all,uy,0
nsel,all
/com,******* Constant Zero Displacement Z *******
CMBLOCK,_DISPZEROUZ,NODE,        4
(8i10)
         2        18        34        50
cmsel,s,_DISPZEROUZ
d,all,uz,0
nsel,all
/com,*********** Define Vertex Force Using Follower Elements ***********
et,10,201
keyo,10,1,1           ! Keep the direction constant
keyo,10,2,1           ! Apply Forces only, not moment
mat,10
real,10
type,10
en,133,65
r,10
rmod,10,1,1.0,              ! FX
mat,11
real,11
type,10
en,134,65
r,11
rmod,11,2,1.0,              ! FY
mat,12
real,12
type,10
en,135,65
r,12
rmod,12,3,1.0,              ! FZ
fini
/com,****************************************************************************
/com,*************************    SOLUTION       ********************************
/com,****************************************************************************
/solu
antype,0                   ! static analysis
_thickRatio=  0     ! Ratio of thick parts in the model
eqsl,sparse,,,,,1
cntr,print,1               ! print out contact info and also make no initial contact an error
cncheck,dmp		!	Enable program controlled contact splitting for distributed memory parallel run
dmpoption,emat,no             ! Don't combine emat file for DANSYS
dmpoption,esav,no             ! Don't combine esav file for DANSYS
nldiag,cont,iter           ! print out contact info each equilibrium iteration
rescontrol,,none                 ! Do not keep any restart files
/com,****************************************************
/com,******************* SOLVE FOR LS 1 OF 1 ****************
esel,s,real,,10
sfe,all,1,pres,1,0.
esel,s,real,,11
sfe,all,1,pres,1,0.
esel,s,real,,12
sfe,all,1,pres,1,-500000.
esel,all
nsub,1,1,1
time,1.
outres,erase
outres,all,none
outres,nsol,all,
outres,rsol,all
outres,eangl,all
outres,etmp,all
outres,veng,all
outres,strs,all,
outres,epel,all,
outres,eppl,all,
outres,cont,all,
esel,s,type,,1
esel,a,type,,2,9
cm,_elmisc,elem
esel,all
outres,misc,all,_elmisc
! *********** WB SOLVE COMMAND ***********
! check interactive state
*get,ANSINTER_,active,,int
*if,ANSINTER_,ne,0,then
/eof
*endif
solve
/com *************** Write FE CONNECTORS *********
CEWRITE,file,ce,,INTE
/com,****************************************************
/com,*************** FINISHED SOLVE FOR LS 1 *************
*get,_NSOLTHREADS,active,0,ntfs
*get,_NSOLPROCESSES,active,0,npfs
/post1
fini
