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/batch
! ANSYS input file written by Workbench version 2023 R2
! File used for geometry attach: C:\Users\skrua\AppData\Local\Temp\WB_skrua_4292_2\wbnew_files\dp0\SYS\DM\SYS.agdb
/title,wbnew--Static Structural (A5)
/COM,/COM,     ANSYSMotion, 2023.2
/com,--- Data in consistent NMM units. See Solving Units in the help system for more information.
/units,MPA
/prep7
! Turn off shape checking because checks already performed inside WB mesher.
! See help system for more information.
SHPP,OFF,,NOWARN
etcon,set             ! allow ANSYS to choose best KEYOP's for 180x elements, resets any applicable keyopt to MAPDL defaults
/com,*********** Nodes for the whole assembly ***********
nblock,3,,11135
(1i9,3e20.9e3)
        1     3.674637681E+00     0.000000000E+00    -3.985507246E+00
        2     5.446626523E+00     0.000000000E+00    -3.986752079E+00
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-1
/com,*********** Nodes for all Remote Points ***********
nblock,3
(1i9,3e20.9e3)
    10124     3.999999992E+01     3.000000026E+00     3.000000054E+00
    10125     9.999999776E+00     3.000000026E+00     0.000000000E+00
-1
/com,*********** Elements for Body 1 "Solid" ***********
et,1,186
keyo,1,2,1          ! set full integration on SOLID186
eblock,19,solid,,1372
(19i9)
        1        1        1        1        0        0        0        0       20        0        1      787      853      943     1254     1726     1660     1570     1259
     5664     5818     6041     5665     7838     7609     6844     6845     5666     5819     6042     6833
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-1
/com,*********** Send User Defined Coordinate System(s) ***********
csys,0
toffst,273.15,  ! Temperature offset from absolute zero
/com,*********** Set Reference Temperature ***********
tref,22.
/com,*********** Send Materials ***********
Temperature = 'TEMP' ! Temperature
MP,DENS,1,2.77e-09,	! tonne mm^-3
MP,ALPX,1,2.3e-05,	! C^-1
MP,C,1,875000000,	! mm^2 s^-2 C^-1
MPTEMP,,,,,,,,
MPTEMP,1,-100
MPTEMP,2,0
MPTEMP,3,100
MPTEMP,4,200
MPDATA,KXX,1, ,114,144,165,175,	! tonne mm s^-3 C^-1
MPTEMP,,,,,,,,
MPTEMP,,,,,,,,
MPTEMP,1,0
MPTEMP,2,20
MPTEMP,3,100
MPDATA,RSVX,1, ,2.43e-05,2.67e-05,3.63e-05,	! ohm mm
MPTEMP,,,,,,,,
MP,EX,1,71000,	! tonne s^-2 mm^-1
MP,NUXY,1,0.33,
MP,MURX,1,1,

!************************* Model Summary ********************
!Solid,	Aluminum Alloy,	matid,	1
!************************* End Model Summary ********************
/com,********* Frictionless Supports X *********
CMBLOCK,_FRICSUX,NODE,       50
(8i10)
      2523      2524      2525      2526      2527      2528      2529      2530
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cmsel,s,_FRICSUX
d,all,ux,0
nsel,all
/com,********* Frictionless Supports Z *********
CMBLOCK,_FRICSUZ,NODE,        8
(8i10)
      2725      2726      2737      2746      9892      9893      9895      9911

cmsel,s,_FRICSUZ
d,all,uz,0
nsel,all
/com,*********** Node Rotations ***********
nmod,2523,,,,-90.,0.,90.
nmod,2524,,,,-90.,-36.0000000000001,90.
nmod,2525,,,,-90.,-72.,90.
nmod,2526,,,,90.,-71.9999999999999,-90.
nmod,2527,,,,90.,-35.9999999999999,-90.
nmod,2528,,,,90.,0.,-90.
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nmod,10113,,,,0.,90.,0.
/com,*********** Create Remote Point "Remote Point 2" ***********
*set,tid,3
*set,cid,2
et,cid,174
et,tid,170
keyo,tid,2,1               ! Don't fix the pilot node
keyo,tid,4,111111
keyo,cid,12,5              ! Bonded Contact
keyo,cid,4,1               ! Deformable RBE3 style load
keyo,cid,2,2               ! MPC style contact
eblock,10,,,10
(15i9)
     4338        2        2        2        0     2523     2932     2931     2531     9489    10104     9505     9488
     4339        2        2        2        0     2931     2940     2532     2531    10105     9506     9504     9505
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-1
*set,_npilot,10124
_npilot55=_npilot
type,tid
mat ,cid
real,cid
tshape,pilo
en,4348,_npilot
tshape
/com,*********** Create Remote Point "Remote Point" ***********
*set,tid,5
*set,cid,4
et,cid,174
et,tid,170
keyo,tid,2,1               ! Don't fix the pilot node
keyo,tid,4,111111
keyo,cid,12,5              ! Bonded Contact
keyo,cid,4,1               ! Deformable RBE3 style load
keyo,cid,2,2               ! MPC style contact
eblock,10,,,1
(15i9)
     4349        4        4        4        0     2725     2726     2737     2746     9892     9895     9911     9893
-1
*set,_npilot,10125
_npilot58=_npilot
type,tid
mat ,cid
real,cid
tshape,pilo
en,4350,_npilot
tshape
/com,*********** Define Force Using Surface Effect Elements ***********
local,12,0,0.,0.,0.,0.,0.,0.
csys,0
et,6,154
mat,6
eblock,10,,,10
(15i9)
     4351        6        6        6       12     2533     2922     2921     2541     9509    10094     9525     9508
     4352        6        6        6       12     2921     2930     2542     2541    10095     9526     9524     9525
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-1
esel,s,type,,6
keyop,6,2,1                ! Apply load in local coordinate system
keyop,6,7,1                ! Use original area so load is constant in large deformation
esel,all
/com,*********** Define Force Using Surface Effect Elements ***********
local,13,0,0.,0.,0.,0.,0.,0.
csys,0
et,7,154
mat,7
eblock,10,,,10
(15i9)
     4361        7        7        7       13     2513     2942     2941     2521     9469    10114     9485     9468
     4362        7        7        7       13     2941     2950     2522     2521    10115     9486     9484     9485
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-1
esel,s,type,,7
keyop,7,2,1                ! Apply load in local coordinate system
keyop,7,7,1                ! Use original area so load is constant in large deformation
esel,all
et,8,14             ! spring element type
/com,*********** Construct Weak Springs, Prototype 1 ***********
*set,_delta,6.52610142259889
type,8
mat,9
real,9
r,9,1.99389302169269e-004
nsel,all
*get,_nspr,ndmx
_nspr=_nspr+1
esel,s,type,,1
nsle,s,active
*get,_minx,node,0,mnloc,x
*get,_miny,node,0,mnloc,y
*get,_minz,node,0,mnloc,z
*get,_maxx,node,0,mxloc,x
*get,_maxy,node,0,mxloc,y
*get,_maxz,node,0,mxloc,z
*dim,_ntets,arra,8
_ntets(1) = NODE(_minx,_miny,_minz)
_ntets(2) = NODE(_minx,_miny,_maxz)
_ntets(3) = NODE(_minx,_maxy,_minz)
_ntets(4) = NODE(_minx,_maxy,_maxz)
_ntets(5) = NODE(_maxx,_miny,_minz)
_ntets(6) = NODE(_maxx,_miny,_maxz)
_ntets(7) = NODE(_maxx,_maxy,_minz)
_ntets(8) = NODE(_maxx,_maxy,_maxz)
*do,_i,1,8
  n,_nspr,nx(_ntets(_i))+_delta,ny(_ntets(_i)),nz(_ntets(_i))
  e,_ntets(_i),_nspr
  d,_nspr,all
  _nspr=_nspr+1
  n,_nspr,nx(_ntets(_i)),ny(_ntets(_i))+_delta,nz(_ntets(_i))
  e,_ntets(_i),_nspr
  d,_nspr,all
  _nspr=_nspr+1
  n,_nspr,nx(_ntets(_i)),ny(_ntets(_i)),nz(_ntets(_i))+_delta
  e,_ntets(_i),_nspr
  d,_nspr,all
  _nspr=_nspr+1
*enddo
*set,_ntets
nsel,all
esel,all
fini
/com,****************************************************************************
/com,*************************    SOLUTION       ********************************
/com,****************************************************************************
/solu
antype,0                   ! static analysis
_thickRatio=  0     ! Ratio of thick parts in the model
eqsl,sparse,,,,,1
cntr,print,1               ! print out contact info and also make no initial contact an error
cncheck,dmp		!	Enable program controlled contact splitting for distributed memory parallel run
dmpoption,emat,no             ! Don't combine emat file for DANSYS
dmpoption,esav,no             ! Don't combine esav file for DANSYS
nldiag,cont,iter           ! print out contact info each equilibrium iteration
rescontrol,,none                 ! Do not keep any restart files
/com,****************************************************
/com,******************* SOLVE FOR LS 1 OF 1 ****************
esel,s,type,,6
nsle
sfe,all,1,pres,1,-8.21546769473213
sfe,all,2,pres,1,0.
sfe,all,3,pres,1,3.42325892855846
esel,s,type,,7
nsle
sfe,all,1,pres,1,8.21546769473213
sfe,all,2,pres,1,0.
sfe,all,3,pres,1,0.
nsel,all
esel,all
nsub,1,1,1
time,1.
outres,erase
outres,all,none
outres,nsol,all,
outres,rsol,all
outres,eangl,all
outres,etmp,all
outres,veng,all
outres,strs,all,
outres,epel,all,
outres,eppl,all,
outres,cont,all,
! *********** WB SOLVE COMMAND ***********
! check interactive state
*get,ANSINTER_,active,,int
*if,ANSINTER_,ne,0,then
/eof
*endif
solve
/com *************** Write FE CONNECTORS *********
CEWRITE,file,ce,,INTE
/com,****************************************************
/com,*************** FINISHED SOLVE FOR LS 1 *************
*get,_NSOLTHREADS,active,0,ntfs
*get,_NSOLPROCESSES,active,0,npfs
/post1
fini
